// COMSOL Multiphysics 6.2.0.290 model "lab_01.mph"
// Outline of the model tree

Parameters
  a = 20 [mm]  // length of the plate
  sigma = 1.0*10^6 [S/m]  // conductivity
  V0 = 1 [V]
  Vs = 0.5 [V]

Geometry
  geom1 "Geometry 1" (2D, length unit m)
    sq1: Square | size = a
    fin: Finalize "Form Union"

Physics
  lpeq: LaplaceEquation "Laplace's Equation" on domains 1
    dependent variable V
    EquationForm.form = Automatic
    Units.DependentVariableQuantity = electricpotential
    Units.CustomDependentVariableUnit = 1
    Units.CustomSourceTermUnit = V*m^-2
    leq1: LaplaceEquation "Laplace's Equation 1" (default)
    zflx1: ZeroFluxBoundary "Zero Flux 1" (default)
    init1: init "Initial Values 1" (default)
    dir1: DirichletBoundary "Dirichlet Boundary Condition 1" on boundaries 1 | r = 0
    dir2: DirichletBoundary "Dirichlet Boundary Condition 2" on boundaries 4 | r = V0
    dir3: DirichletBoundary "Dirichlet Boundary Condition 3" (disabled) on boundaries 2 | r = V0*x/a
    dir4: DirichletBoundary "Dirichlet Boundary Condition 4" (disabled) on boundaries 3 | r = (V0*x/a) + Vs*sin(pi*x/a)
    zflx2: ZeroFluxBoundary "Zero Flux 2" (disabled) on boundaries 2, 3

Mesh
  mesh1 "Mesh 1"
    size: MeshSizeDefault | hmax = 0.00134; hmin = 6.0E-6; hcurve = 0.3; hgrad = 1.3
    map1: Map "Mapped 1" on remaining entities
      dis1: Distribution on boundaries 2, 3 | type = predefined; elemcount = 50; elemratio = 100; symmetric = on
      dis2: Distribution on boundaries 1, 4 | type = predefined; elemcount = 50; elemratio = 100; symmetric = on

Studies
  std1 "Study 1"
    stat: Stationary
  std2 "Study 2"
    stat: Stationary

Solver configurations
  sol1 "Solution 1" (study std1)
    v1: Variables "Dependent Variables 1"
    s1: Stationary "Stationary Solver 1"
      dDef: Direct
      fc1: FullyCoupled | linsolver = dDef
  sol2 "Solution 2" (study std2)
    // same settings as sol1

Datasets
  dset1: Solution | solution = sol1
  dset2: Solution | solution = sol2
  cln1: CutLine2D | data = dset1; genpoints = {{0, a/2}, {a, a/2}}
  cln2: CutLine2D | data = dset1; genpoints = {{a/2, 0}, {a/2, a}}
  cln3: CutLine2D | data = dset2; genpoints = {{0, a/2}, {a, a/2}}
  cln4: CutLine2D | data = dset2; genpoints = {{a/2, 0}, {a/2, a}}

Plots
  pg1: PlotGroup2D "Laplace's Equation" | data = dset1
    surf1: Surface | expr = V
  pg2: PlotGroup2D "2D Plot Group 2" | data = dset1
    con1: Contour | expr = V
  pg4: PlotGroup2D "Laplace's Equation 1" | data = dset2
    surf1: Surface | expr = V
  pg5: PlotGroup1D "1D Plot Group 5" | data = dset1
    lngr1: LineGraph | data = cln2; expr = V
    lngr2: LineGraph | data = cln4; expr = V